<Lems>

    <Target component="sim1" />

    <!-- Include core NeuroML2 ComponentType definitions -->
    <Include file="Cells.xml" />
    <Include file="Networks.xml" />
    <Include file="Simulation.xml" />

    <Include file="../CellDefinition.xml" />

    <!-- Main NeuroML2 content. Based on http://www.scholarpedia.org/article/FitzHugh-Nagumo_model -->

    <abbottChance2005Cell id="Exc"   Vth="-50mV" Vr="-60mV" Vl="-70mV" Vscale="1mV" gl="6.25nS" tau="28.8ms" tau_r="2ms" r0="30Hz"/>
    <abbottChance2005Cell id="PV"  Vth="-50mV" Vr="-60mV" Vl="-70mV" Vscale="1mV" gl="10nS"   tau="8ms"   tau_r="2ms" r0="50Hz"/>
    <abbottChance2005Cell id="SST" Vth="-50mV" Vr="-60mV" Vl="-70mV" Vscale="1mV" gl="5nS"    tau="16ms"  tau_r="2ms" r0="30Hz"/>
    <abbottChance2005Cell id="VIP" Vth="-50mV" Vr="-60mV" Vl="-70mV" Vscale="1mV" gl="5nS"    tau="16ms"  tau_r="2ms" r0="20Hz"/>

    <!--Dummy synapse which emits no current. Used as presynaptic endpoint for analog synaptic connection.-->
    <silentRateSynapse id="silent1"/>

    <rateSynapsePicoAmp id="rs" />

    <pulseGenerator id="baseline_exc" delay="0ms" duration="200ms" amplitude="147.2512 pA" />
    <pulseGenerator id="baseline_pv" delay="0ms" duration="200ms" amplitude="386.7281 pA" />
    <pulseGenerator id="baseline_sst" delay="0ms" duration="200ms" amplitude="40.2657 pA" />
    <pulseGenerator id="baseline_viP" delay="0ms" duration="200ms" amplitude="98.4368 pA" />

    <pulseGenerator id="modVIP" delay="50ms" duration="150ms" amplitude="10 pA" />

    <network id="net1">
        <population id="excPop" component="Exc" size="1" />
        <population id="pvPop" component="PV" size="1" />
        <population id="sstPop" component="SST" size="1" />
        <population id="vipPop" component="VIP" size="1" />

        <continuousProjection id ="vip_sst" presynapticPopulation="vipPop" postsynapticPopulation="sstPop">
            <continuousConnectionInstanceW id="0" preCell="../vipPop[0]" postCell="../sstPop[0]" preComponent="silent1" postComponent="rs" weight="-2.7896"/>
        </continuousProjection>

        <continuousProjection id ="sst_e" presynapticPopulation="sstPop" postsynapticPopulation="excPop">
            <continuousConnectionInstanceW id="0" preCell="../sstPop[0]" postCell="../excPop[0]" preComponent="silent1" postComponent="rs" weight="-0.8039"/>
        </continuousProjection>
        <continuousProjection id ="sst_pv" presynapticPopulation="sstPop" postsynapticPopulation="pvPop">
            <continuousConnectionInstanceW id="0" preCell="../sstPop[0]" postCell="../pvPop[0]" preComponent="silent1" postComponent="rs" weight="-2.1291"/>
        </continuousProjection>
        <continuousProjection id ="sst_vip" presynapticPopulation="sstPop" postsynapticPopulation="vipPop">
            <continuousConnectionInstanceW id="0" preCell="../sstPop[0]" postCell="../vipPop[0]" preComponent="silent1" postComponent="rs" weight="-0.1560"/>
        </continuousProjection>

        <continuousProjection id ="pv_e" presynapticPopulation="pvPop" postsynapticPopulation="excPop">
            <continuousConnectionInstanceW id="0" preCell="../pvPop[0]" postCell="../excPop[0]" preComponent="silent1" postComponent="rs" weight="-0.3329"/>
        </continuousProjection>
        <continuousProjection id ="pv_pv" presynapticPopulation="pvPop" postsynapticPopulation="pvPop">
            <continuousConnectionInstanceW id="0" preCell="../pvPop[0]" postCell="../pvPop[0]" preComponent="silent1" postComponent="rs" weight="-3.4554"/>
        </continuousProjection>

        <continuousProjection id ="e_e" presynapticPopulation="excPop" postsynapticPopulation="excPop">
            <continuousConnectionInstanceW id="0" preCell="../excPop[0]" postCell="../excPop[0]" preComponent="silent1" postComponent="rs" weight="2.4167"/>
        </continuousProjection>
        <continuousProjection id ="e_pv" presynapticPopulation="excPop" postsynapticPopulation="pvPop">
            <continuousConnectionInstanceW id="0" preCell="../excPop[0]" postCell="../pvPop[0]" preComponent="silent1" postComponent="rs" weight="2.9706"/>
        </continuousProjection>
        <continuousProjection id ="e_sst" presynapticPopulation="excPop" postsynapticPopulation="sstPop">
            <continuousConnectionInstanceW id="0" preCell="../excPop[0]" postCell="../sstPop[0]" preComponent="silent1" postComponent="rs" weight="4.6440"/>
        </continuousProjection>
        <continuousProjection id ="e_vip" presynapticPopulation="excPop" postsynapticPopulation="vipPop">
            <continuousConnectionInstanceW id="0" preCell="../excPop[0]" postCell="../vipPop[0]" preComponent="silent1" postComponent="rs" weight="0.7162"/>
        </continuousProjection>

        <explicitInput target="excPop[0]" input="baseline_exc" destination="synapses"/>
        <explicitInput target="pvPop[0]" input="baseline_pv" destination="synapses"/>
        <explicitInput target="sstPop[0]" input="baseline_sst" destination="synapses"/>
        <explicitInput target="vipPop[0]" input="baseline_viP" destination="synapses"/>

        <explicitInput target="vipPop[0]" input="modVIP" destination="synapses"/>

    </network>

    <!-- End of NeuroML2 content -->

    <Simulation id="sim1" length="200ms" step="0.1ms" target="net1">

        <Display id="d1" title="Voltages" timeScale="1s" xmin="45" xmax="65" ymin="-80" ymax="10">
            <Line id="e" quantity="excPop[0]/V" scale="1mV" color="#0000ff" timeScale="1ms" />
            <Line id="pv" quantity="pvPop[0]/V" scale="1mV" color="#ff0000" timeScale="1ms" />
            <Line id="sst" quantity="sstPop[0]/V" scale="1mV" color="#DDA0DD" timeScale="1ms" />
            <Line id="vip" quantity="vipPop[0]/V" scale="1mV" color="#00ff00" timeScale="1ms" />
        </Display>

        <Display id="d3" title="iSyn" timeScale="1s" xmin="45" xmax="65" ymin="0" ymax="150">
            <Line id="e" quantity="excPop[0]/iSyn" scale="1pA" color="#0000ff" timeScale="1ms" />
            <Line id="pv" quantity="pvPop[0]/iSyn" scale="1pA" color="#ff0000" timeScale="1ms" />
            <Line id="sst" quantity="sstPop[0]/iSyn" scale="1pA" color="#DDA0DD" timeScale="1ms" />
            <Line id="vip" quantity="vipPop[0]/iSyn" scale="1pA" color="#00ff00" timeScale="1ms" />
        </Display>

        <Display id="d2" title="Rates" timeScale="1s" xmin="45" xmax="65" ymin="0" ymax="65">
            <Line id="e" quantity="excPop[0]/r" scale="1Hz" color="#0000ff" timeScale="1ms" />
            <Line id="pv" quantity="pvPop[0]/r" scale="1Hz" color="#ff0000" timeScale="1ms" />
            <Line id="sst" quantity="sstPop[0]/r" scale="1Hz" color="#DDA0DD" timeScale="1ms" />
            <Line id="vip" quantity="vipPop[0]/r" scale="1Hz" color="#00ff00" timeScale="1ms" />
        </Display>

        <OutputFile id="of1" fileName="rates_high.dat">
            <OutputColumn id="e" quantity="excPop[0]/r"/>
            <OutputColumn id="pv" quantity="pvPop[0]/r"/>
            <OutputColumn id="sst" quantity="sstPop[0]/r"/>
            <OutputColumn id="vip" quantity="vipPop[0]/r"/>

            <OutputColumn id="V_e" quantity="excPop[0]/V"/>
            <OutputColumn id="V_pv" quantity="pvPop[0]/V"/>
            <OutputColumn id="V_sst" quantity="sstPop[0]/V"/>
            <OutputColumn id="V_vip" quantity="vipPop[0]/V"/>
        </OutputFile>

    </Simulation>

</Lems>
