<Lems>

    <!--

        This LEMS file has been automatically generated using PyNeuroML v0.3.11 (libNeuroML v0.2.39)

     -->

    <!-- Specify which component to run -->
    <Target component="LEMS_fISim_e.xml"/>

    <!-- Include core NeuroML2 ComponentType definitions -->
    <Include file="Cells.xml"/>
    <Include file="Networks.xml"/>
    <Include file="Simulation.xml"/>

    <Include file="/Users/jessica/Dropbox/GSoC/delMolino/NeuroML/RateBased.xml"/>
    <Include file="RateBasedSpecifications_high_baseline.xml"/>
    <Include file="fi_e.nml"/>

    <Simulation id="LEMS_fISim_e.xml" length="200ms" step="0.1ms" target="net_e" seed="12345">  <!-- Note seed: ensures same random numbers used every run -->

        <Display id="Rate" title="Rates" timeScale="1ms" xmin="-20.0" xmax="220.0" ymin="-2" ymax="45">
            <Line id="e0" quantity="ePop[0]/r" scale="1" color="#0000ff" timeScale="1ms"/>
            <Line id="e10" quantity="ePop[10]/r" scale="1" color="#DDA0DD" timeScale="1ms"/>
            <Line id="e19" quantity="ePop[19]/r" scale="1" color="#00ff00" timeScale="1ms"/>
        </Display>

        <Display id="Voltage" title="Voltages" timeScale="1ms" xmin="-20.0" xmax="220.0" ymin="-.072" ymax="-.035">
            <Line id="e0" quantity="ePop[0]/V" scale="1" color="#0000ff" timeScale="1ms"/>
            <Line id="e10" quantity="ePop[10]/V" scale="1" color="#DDA0DD" timeScale="1ms"/>
            <Line id="e19" quantity="ePop[19]/V" scale="1" color="#00ff00" timeScale="1ms"/>
        </Display>

        <OutputFile id="of1" fileName="fI_e.dat">
            <OutputColumn id="r0" quantity="ePop[0]/r"/>
            <OutputColumn id="V0" quantity="ePop[0]/V"/>
            <OutputColumn id="r1" quantity="ePop[1]/r"/>
            <OutputColumn id="V1" quantity="ePop[1]/V"/>
            <OutputColumn id="r2" quantity="ePop[2]/r"/>
            <OutputColumn id="V2" quantity="ePop[2]/V"/>
            <OutputColumn id="r3" quantity="ePop[3]/r"/>
            <OutputColumn id="V3" quantity="ePop[3]/V"/>
            <OutputColumn id="r4" quantity="ePop[4]/r"/>
            <OutputColumn id="V4" quantity="ePop[4]/V"/>
            <OutputColumn id="r5" quantity="ePop[5]/r"/>
            <OutputColumn id="V5" quantity="ePop[5]/V"/>
            <OutputColumn id="r6" quantity="ePop[6]/r"/>
            <OutputColumn id="V6" quantity="ePop[6]/V"/>
            <OutputColumn id="r7" quantity="ePop[7]/r"/>
            <OutputColumn id="V7" quantity="ePop[7]/V"/>
            <OutputColumn id="r8" quantity="ePop[8]/r"/>
            <OutputColumn id="V8" quantity="ePop[8]/V"/>
            <OutputColumn id="r9" quantity="ePop[9]/r"/>
            <OutputColumn id="V9" quantity="ePop[9]/V"/>
            <OutputColumn id="r10" quantity="ePop[10]/r"/>
            <OutputColumn id="V10" quantity="ePop[10]/V"/>
            <OutputColumn id="r11" quantity="ePop[11]/r"/>
            <OutputColumn id="V11" quantity="ePop[11]/V"/>
            <OutputColumn id="r12" quantity="ePop[12]/r"/>
            <OutputColumn id="V12" quantity="ePop[12]/V"/>
            <OutputColumn id="r13" quantity="ePop[13]/r"/>
            <OutputColumn id="V13" quantity="ePop[13]/V"/>
            <OutputColumn id="r14" quantity="ePop[14]/r"/>
            <OutputColumn id="V14" quantity="ePop[14]/V"/>
            <OutputColumn id="r15" quantity="ePop[15]/r"/>
            <OutputColumn id="V15" quantity="ePop[15]/V"/>
            <OutputColumn id="r16" quantity="ePop[16]/r"/>
            <OutputColumn id="V16" quantity="ePop[16]/V"/>
            <OutputColumn id="r17" quantity="ePop[17]/r"/>
            <OutputColumn id="V17" quantity="ePop[17]/V"/>
            <OutputColumn id="r18" quantity="ePop[18]/r"/>
            <OutputColumn id="V18" quantity="ePop[18]/V"/>
            <OutputColumn id="r19" quantity="ePop[19]/r"/>
            <OutputColumn id="V19" quantity="ePop[19]/V"/>
        </OutputFile>

    </Simulation>

</Lems>
