<neuroml xmlns="http://www.neuroml.org/schema/neuroml2"  xmlns:xs="http://www.w3.org/2001/XMLSchema" xmlns:xsi="http://www.w3.org/2001/XMLSchema-instance" xsi:schemaLocation="http://www.neuroml.org/schema/neuroml2 https://raw.github.com/NeuroML/NeuroML2/development/Schemas/NeuroML2/NeuroML_v2beta5.xsd" id="RandomPopulation">
    <silentSynapse id="silent1"/>
    <pulseGenerator id="baseline_exc" delay="0ms" duration="300ms" amplitude="147.2512 pA"/>
    <pulseGenerator id="baseline_pv" delay="0ms" duration="300ms" amplitude="386.7281 pA"/>
    <pulseGenerator id="baseline_sst" delay="0ms" duration="300ms" amplitude="40.2657 pA"/>
    <pulseGenerator id="baseline_vip" delay="0ms" duration="300ms" amplitude="98.4368 pA"/>
    <pulseGenerator id="modVIP" delay="100ms" duration="200ms" amplitude="10 pA"/>
    <network id="net2">
        <population id="excPop" component="EXC" size="200" type="populationList">
            <instance id="0">
                <location x="63.942679845800001" y="2.50107552227" z="27.5029318369"/>
            </instance>
            <instance id="1">
                <location x="22.3210738149" y="73.647121416399997" z="67.669948742299994"/>
            </instance>
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        </population>
        <population id="pvPop" component="PV" size="25" type="populationList">
            <instance id="0">
                <location x="8.561296195800001" y="72.007466410399999" z="48.857784684899997"/>
            </instance>
            <instance id="1">
                <location x="75.816465348199998" y="69.060933944699997" z="64.590289974100003"/>
            </instance>
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        </population>
        <population id="sstPop" component="SST" size="12" type="populationList">
            <instance id="0">
                <location x="60.963091224499998" y="74.008930548500004" z="94.759020032500004"/>
            </instance>
            <instance id="1">
                <location x="20.778790582399999" y="21.1025195305" z="66.042813719199998"/>
            </instance>
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        </population>
        <population id="vipPop" component="VIP" size="12" type="populationList">
            <instance id="0">
                <location x="69.973368497600006" y="94.267624074400004" z="50.047217711800002"/>
            </instance>
            <instance id="1">
                <location x="49.379521934499998" y="8.044185189929999" z="3.98607841836"/>
            </instance>
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        </population>
        <continuousProjection id="exc_exc" presynapticPopulation="excPop" postsynapticPopulation="excPop">
            <continuousConnectionInstanceW id="0" preCell="../excPop/0/EXC" postCell="../excPop/135/EXC" preComponent="silent1" postComponent="rs" weight="0.605"/>
            <continuousConnectionInstanceW id="1" preCell="../excPop/1/EXC" postCell="../excPop/9/EXC" preComponent="silent1" postComponent="rs" weight="0.605"/>
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        </continuousProjection>
        <continuousProjection id="exc_pv" presynapticPopulation="excPop" postsynapticPopulation="pvPop">
            <continuousConnectionInstanceW id="0" preCell="../excPop/9/EXC" postCell="../pvPop/23/PV" preComponent="silent1" postComponent="rs" weight="1.485"/>
            <continuousConnectionInstanceW id="1" preCell="../excPop/12/EXC" postCell="../pvPop/12/PV" preComponent="silent1" postComponent="rs" weight="1.485"/>
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        </continuousProjection>
        <continuousProjection id="exc_sst" presynapticPopulation="excPop" postsynapticPopulation="sstPop">
            <continuousConnectionInstanceW id="0" preCell="../excPop/5/EXC" postCell="../sstPop/0/SST" preComponent="silent1" postComponent="rs" weight="2.32"/>
            <continuousConnectionInstanceW id="1" preCell="../excPop/16/EXC" postCell="../sstPop/3/SST" preComponent="silent1" postComponent="rs" weight="2.32"/>
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        </continuousProjection>
        <continuousProjection id="exc_vip" presynapticPopulation="excPop" postsynapticPopulation="vipPop">
            <continuousConnectionInstanceW id="0" preCell="../excPop/2/EXC" postCell="../vipPop/9/VIP" preComponent="silent1" postComponent="rs" weight="0.355"/>
            <continuousConnectionInstanceW id="1" preCell="../excPop/3/EXC" postCell="../vipPop/5/VIP" preComponent="silent1" postComponent="rs" weight="0.355"/>
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        </continuousProjection>
        <continuousProjection id="pv_exc" presynapticPopulation="pvPop" postsynapticPopulation="excPop">
            <continuousConnectionInstanceW id="0" preCell="../pvPop/0/PV" postCell="../excPop/0/EXC" preComponent="silent1" postComponent="rs" weight="-0.0132"/>
            <continuousConnectionInstanceW id="1" preCell="../pvPop/0/PV" postCell="../excPop/1/EXC" preComponent="silent1" postComponent="rs" weight="-0.0132"/>
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        </continuousProjection>
        <continuousProjection id="pv_pv" presynapticPopulation="pvPop" postsynapticPopulation="pvPop">
            <continuousConnectionInstanceW id="0" preCell="../pvPop/0/PV" postCell="../pvPop/0/PV" preComponent="silent1" postComponent="rs" weight="-0.138"/>
            <continuousConnectionInstanceW id="1" preCell="../pvPop/0/PV" postCell="../pvPop/1/PV" preComponent="silent1" postComponent="rs" weight="-0.138"/>
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        </continuousProjection>
        <continuousProjection id="sst_exc" presynapticPopulation="sstPop" postsynapticPopulation="excPop">
            <continuousConnectionInstanceW id="0" preCell="../sstPop/0/SST" postCell="../excPop/0/EXC" preComponent="silent1" postComponent="rs" weight="-0.066666666666667"/>
            <continuousConnectionInstanceW id="1" preCell="../sstPop/0/SST" postCell="../excPop/1/EXC" preComponent="silent1" postComponent="rs" weight="-0.066666666666667"/>
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        </continuousProjection>
        <continuousProjection id="sst_pv" presynapticPopulation="sstPop" postsynapticPopulation="pvPop">
            <continuousConnectionInstanceW id="0" preCell="../sstPop/0/SST" postCell="../pvPop/0/PV" preComponent="silent1" postComponent="rs" weight="-0.208823529411765"/>
            <continuousConnectionInstanceW id="1" preCell="../sstPop/0/SST" postCell="../pvPop/1/PV" preComponent="silent1" postComponent="rs" weight="-0.208823529411765"/>
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        </continuousProjection>
        <continuousProjection id="sst_vip" presynapticPopulation="sstPop" postsynapticPopulation="vipPop">
            <continuousConnectionInstanceW id="0" preCell="../sstPop/0/SST" postCell="../vipPop/0/VIP" preComponent="silent1" postComponent="rs" weight="-0.026666666666667"/>
            <continuousConnectionInstanceW id="1" preCell="../sstPop/0/SST" postCell="../vipPop/1/VIP" preComponent="silent1" postComponent="rs" weight="-0.026666666666667"/>
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        </continuousProjection>
        <continuousProjection id="vip_sst" presynapticPopulation="vipPop" postsynapticPopulation="sstPop">
            <continuousConnectionInstanceW id="0" preCell="../vipPop/0/VIP" postCell="../sstPop/5/SST" preComponent="silent1" postComponent="rs" weight="-0.422727272727273"/>
            <continuousConnectionInstanceW id="1" preCell="../vipPop/0/VIP" postCell="../sstPop/6/SST" preComponent="silent1" postComponent="rs" weight="-0.422727272727273"/>
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        </continuousProjection>
        <explicitInput target="excPop/0/EXC" input="baseline_exc" destination="synapses"/>
        <explicitInput target="excPop/1/EXC" input="baseline_exc" destination="synapses"/>
        <explicitInput target="excPop/2/EXC" input="baseline_exc" destination="synapses"/>
        <explicitInput target="excPop/3/EXC" input="baseline_exc" destination="synapses"/>
        <explicitInput target="excPop/4/EXC" input="baseline_exc" destination="synapses"/>
        <explicitInput target="excPop/5/EXC" input="baseline_exc" destination="synapses"/>
        <explicitInput target="excPop/6/EXC" input="baseline_exc" destination="synapses"/>
        <explicitInput target="excPop/7/EXC" input="baseline_exc" destination="synapses"/>
        <explicitInput target="excPop/8/EXC" input="baseline_exc" destination="synapses"/>
        <explicitInput target="excPop/9/EXC" input="baseline_exc" destination="synapses"/>
        <explicitInput target="excPop/10/EXC" input="baseline_exc" destination="synapses"/>
        <explicitInput target="excPop/11/EXC" input="baseline_exc" destination="synapses"/>
        <explicitInput target="excPop/12/EXC" input="baseline_exc" destination="synapses"/>
        <explicitInput target="excPop/13/EXC" input="baseline_exc" destination="synapses"/>
        <explicitInput target="excPop/14/EXC" input="baseline_exc" destination="synapses"/>
        <explicitInput target="excPop/15/EXC" input="baseline_exc" destination="synapses"/>
        <explicitInput target="excPop/16/EXC" input="baseline_exc" destination="synapses"/>
        <explicitInput target="excPop/17/EXC" input="baseline_exc" destination="synapses"/>
        <explicitInput target="excPop/18/EXC" input="baseline_exc" destination="synapses"/>
        <explicitInput target="excPop/19/EXC" input="baseline_exc" destination="synapses"/>
        <explicitInput target="excPop/20/EXC" input="baseline_exc" destination="synapses"/>
        <explicitInput target="excPop/21/EXC" input="baseline_exc" destination="synapses"/>
        <explicitInput target="excPop/22/EXC" input="baseline_exc" destination="synapses"/>
        <explicitInput target="excPop/23/EXC" input="baseline_exc" destination="synapses"/>
        <explicitInput target="excPop/24/EXC" input="baseline_exc" destination="synapses"/>
        <explicitInput target="excPop/25/EXC" input="baseline_exc" destination="synapses"/>
        <explicitInput target="excPop/26/EXC" input="baseline_exc" destination="synapses"/>
        <explicitInput target="excPop/27/EXC" input="baseline_exc" destination="synapses"/>
        <explicitInput target="excPop/28/EXC" input="baseline_exc" destination="synapses"/>
        <explicitInput target="excPop/29/EXC" input="baseline_exc" destination="synapses"/>
        <explicitInput target="excPop/30/EXC" input="baseline_exc" destination="synapses"/>
        <explicitInput target="excPop/31/EXC" input="baseline_exc" destination="synapses"/>
        <explicitInput target="excPop/32/EXC" input="baseline_exc" destination="synapses"/>
        <explicitInput target="excPop/33/EXC" input="baseline_exc" destination="synapses"/>
        <explicitInput target="excPop/34/EXC" input="baseline_exc" destination="synapses"/>
        <explicitInput target="excPop/35/EXC" input="baseline_exc" destination="synapses"/>
        <explicitInput target="excPop/36/EXC" input="baseline_exc" destination="synapses"/>
        <explicitInput target="excPop/37/EXC" input="baseline_exc" destination="synapses"/>
        <explicitInput target="excPop/38/EXC" input="baseline_exc" destination="synapses"/>
        <explicitInput target="excPop/39/EXC" input="baseline_exc" destination="synapses"/>
        <explicitInput target="excPop/40/EXC" input="baseline_exc" destination="synapses"/>
        <explicitInput target="excPop/41/EXC" input="baseline_exc" destination="synapses"/>
        <explicitInput target="excPop/42/EXC" input="baseline_exc" destination="synapses"/>
        <explicitInput target="excPop/43/EXC" input="baseline_exc" destination="synapses"/>
        <explicitInput target="excPop/44/EXC" input="baseline_exc" destination="synapses"/>
        <explicitInput target="excPop/45/EXC" input="baseline_exc" destination="synapses"/>
        <explicitInput target="excPop/46/EXC" input="baseline_exc" destination="synapses"/>
        <explicitInput target="excPop/47/EXC" input="baseline_exc" destination="synapses"/>
        <explicitInput target="excPop/48/EXC" input="baseline_exc" destination="synapses"/>
        <explicitInput target="excPop/49/EXC" input="baseline_exc" destination="synapses"/>
        <explicitInput target="excPop/50/EXC" input="baseline_exc" destination="synapses"/>
        <explicitInput target="excPop/51/EXC" input="baseline_exc" destination="synapses"/>
        <explicitInput target="excPop/52/EXC" input="baseline_exc" destination="synapses"/>
        <explicitInput target="excPop/53/EXC" input="baseline_exc" destination="synapses"/>
        <explicitInput target="excPop/54/EXC" input="baseline_exc" destination="synapses"/>
        <explicitInput target="excPop/55/EXC" input="baseline_exc" destination="synapses"/>
        <explicitInput target="excPop/56/EXC" input="baseline_exc" destination="synapses"/>
        <explicitInput target="excPop/57/EXC" input="baseline_exc" destination="synapses"/>
        <explicitInput target="excPop/58/EXC" input="baseline_exc" destination="synapses"/>
        <explicitInput target="excPop/59/EXC" input="baseline_exc" destination="synapses"/>
        <explicitInput target="excPop/60/EXC" input="baseline_exc" destination="synapses"/>
        <explicitInput target="excPop/61/EXC" input="baseline_exc" destination="synapses"/>
        <explicitInput target="excPop/62/EXC" input="baseline_exc" destination="synapses"/>
        <explicitInput target="excPop/63/EXC" input="baseline_exc" destination="synapses"/>
        <explicitInput target="excPop/64/EXC" input="baseline_exc" destination="synapses"/>
        <explicitInput target="excPop/65/EXC" input="baseline_exc" destination="synapses"/>
        <explicitInput target="excPop/66/EXC" input="baseline_exc" destination="synapses"/>
        <explicitInput target="excPop/67/EXC" input="baseline_exc" destination="synapses"/>
        <explicitInput target="excPop/68/EXC" input="baseline_exc" destination="synapses"/>
        <explicitInput target="excPop/69/EXC" input="baseline_exc" destination="synapses"/>
        <explicitInput target="excPop/70/EXC" input="baseline_exc" destination="synapses"/>
        <explicitInput target="excPop/71/EXC" input="baseline_exc" destination="synapses"/>
        <explicitInput target="excPop/72/EXC" input="baseline_exc" destination="synapses"/>
        <explicitInput target="excPop/73/EXC" input="baseline_exc" destination="synapses"/>
        <explicitInput target="excPop/74/EXC" input="baseline_exc" destination="synapses"/>
        <explicitInput target="excPop/75/EXC" input="baseline_exc" destination="synapses"/>
        <explicitInput target="excPop/76/EXC" input="baseline_exc" destination="synapses"/>
        <explicitInput target="excPop/77/EXC" input="baseline_exc" destination="synapses"/>
        <explicitInput target="excPop/78/EXC" input="baseline_exc" destination="synapses"/>
        <explicitInput target="excPop/79/EXC" input="baseline_exc" destination="synapses"/>
        <explicitInput target="excPop/80/EXC" input="baseline_exc" destination="synapses"/>
        <explicitInput target="excPop/81/EXC" input="baseline_exc" destination="synapses"/>
        <explicitInput target="excPop/82/EXC" input="baseline_exc" destination="synapses"/>
        <explicitInput target="excPop/83/EXC" input="baseline_exc" destination="synapses"/>
        <explicitInput target="excPop/84/EXC" input="baseline_exc" destination="synapses"/>
        <explicitInput target="excPop/85/EXC" input="baseline_exc" destination="synapses"/>
        <explicitInput target="excPop/86/EXC" input="baseline_exc" destination="synapses"/>
        <explicitInput target="excPop/87/EXC" input="baseline_exc" destination="synapses"/>
        <explicitInput target="excPop/88/EXC" input="baseline_exc" destination="synapses"/>
        <explicitInput target="excPop/89/EXC" input="baseline_exc" destination="synapses"/>
        <explicitInput target="excPop/90/EXC" input="baseline_exc" destination="synapses"/>
        <explicitInput target="excPop/91/EXC" input="baseline_exc" destination="synapses"/>
        <explicitInput target="excPop/92/EXC" input="baseline_exc" destination="synapses"/>
        <explicitInput target="excPop/93/EXC" input="baseline_exc" destination="synapses"/>
        <explicitInput target="excPop/94/EXC" input="baseline_exc" destination="synapses"/>
        <explicitInput target="excPop/95/EXC" input="baseline_exc" destination="synapses"/>
        <explicitInput target="excPop/96/EXC" input="baseline_exc" destination="synapses"/>
        <explicitInput target="excPop/97/EXC" input="baseline_exc" destination="synapses"/>
        <explicitInput target="excPop/98/EXC" input="baseline_exc" destination="synapses"/>
        <explicitInput target="excPop/99/EXC" input="baseline_exc" destination="synapses"/>
        <explicitInput target="excPop/100/EXC" input="baseline_exc" destination="synapses"/>
        <explicitInput target="excPop/101/EXC" input="baseline_exc" destination="synapses"/>
        <explicitInput target="excPop/102/EXC" input="baseline_exc" destination="synapses"/>
        <explicitInput target="excPop/103/EXC" input="baseline_exc" destination="synapses"/>
        <explicitInput target="excPop/104/EXC" input="baseline_exc" destination="synapses"/>
        <explicitInput target="excPop/105/EXC" input="baseline_exc" destination="synapses"/>
        <explicitInput target="excPop/106/EXC" input="baseline_exc" destination="synapses"/>
        <explicitInput target="excPop/107/EXC" input="baseline_exc" destination="synapses"/>
        <explicitInput target="excPop/108/EXC" input="baseline_exc" destination="synapses"/>
        <explicitInput target="excPop/109/EXC" input="baseline_exc" destination="synapses"/>
        <explicitInput target="excPop/110/EXC" input="baseline_exc" destination="synapses"/>
        <explicitInput target="excPop/111/EXC" input="baseline_exc" destination="synapses"/>
        <explicitInput target="excPop/112/EXC" input="baseline_exc" destination="synapses"/>
        <explicitInput target="excPop/113/EXC" input="baseline_exc" destination="synapses"/>
        <explicitInput target="excPop/114/EXC" input="baseline_exc" destination="synapses"/>
        <explicitInput target="excPop/115/EXC" input="baseline_exc" destination="synapses"/>
        <explicitInput target="excPop/116/EXC" input="baseline_exc" destination="synapses"/>
        <explicitInput target="excPop/117/EXC" input="baseline_exc" destination="synapses"/>
        <explicitInput target="excPop/118/EXC" input="baseline_exc" destination="synapses"/>
        <explicitInput target="excPop/119/EXC" input="baseline_exc" destination="synapses"/>
        <explicitInput target="excPop/120/EXC" input="baseline_exc" destination="synapses"/>
        <explicitInput target="excPop/121/EXC" input="baseline_exc" destination="synapses"/>
        <explicitInput target="excPop/122/EXC" input="baseline_exc" destination="synapses"/>
        <explicitInput target="excPop/123/EXC" input="baseline_exc" destination="synapses"/>
        <explicitInput target="excPop/124/EXC" input="baseline_exc" destination="synapses"/>
        <explicitInput target="excPop/125/EXC" input="baseline_exc" destination="synapses"/>
        <explicitInput target="excPop/126/EXC" input="baseline_exc" destination="synapses"/>
        <explicitInput target="excPop/127/EXC" input="baseline_exc" destination="synapses"/>
        <explicitInput target="excPop/128/EXC" input="baseline_exc" destination="synapses"/>
        <explicitInput target="excPop/129/EXC" input="baseline_exc" destination="synapses"/>
        <explicitInput target="excPop/130/EXC" input="baseline_exc" destination="synapses"/>
        <explicitInput target="excPop/131/EXC" input="baseline_exc" destination="synapses"/>
        <explicitInput target="excPop/132/EXC" input="baseline_exc" destination="synapses"/>
        <explicitInput target="excPop/133/EXC" input="baseline_exc" destination="synapses"/>
        <explicitInput target="excPop/134/EXC" input="baseline_exc" destination="synapses"/>
        <explicitInput target="excPop/135/EXC" input="baseline_exc" destination="synapses"/>
        <explicitInput target="excPop/136/EXC" input="baseline_exc" destination="synapses"/>
        <explicitInput target="excPop/137/EXC" input="baseline_exc" destination="synapses"/>
        <explicitInput target="excPop/138/EXC" input="baseline_exc" destination="synapses"/>
        <explicitInput target="excPop/139/EXC" input="baseline_exc" destination="synapses"/>
        <explicitInput target="excPop/140/EXC" input="baseline_exc" destination="synapses"/>
        <explicitInput target="excPop/141/EXC" input="baseline_exc" destination="synapses"/>
        <explicitInput target="excPop/142/EXC" input="baseline_exc" destination="synapses"/>
        <explicitInput target="excPop/143/EXC" input="baseline_exc" destination="synapses"/>
        <explicitInput target="excPop/144/EXC" input="baseline_exc" destination="synapses"/>
        <explicitInput target="excPop/145/EXC" input="baseline_exc" destination="synapses"/>
        <explicitInput target="excPop/146/EXC" input="baseline_exc" destination="synapses"/>
        <explicitInput target="excPop/147/EXC" input="baseline_exc" destination="synapses"/>
        <explicitInput target="excPop/148/EXC" input="baseline_exc" destination="synapses"/>
        <explicitInput target="excPop/149/EXC" input="baseline_exc" destination="synapses"/>
        <explicitInput target="excPop/150/EXC" input="baseline_exc" destination="synapses"/>
        <explicitInput target="excPop/151/EXC" input="baseline_exc" destination="synapses"/>
        <explicitInput target="excPop/152/EXC" input="baseline_exc" destination="synapses"/>
        <explicitInput target="excPop/153/EXC" input="baseline_exc" destination="synapses"/>
        <explicitInput target="excPop/154/EXC" input="baseline_exc" destination="synapses"/>
        <explicitInput target="excPop/155/EXC" input="baseline_exc" destination="synapses"/>
        <explicitInput target="excPop/156/EXC" input="baseline_exc" destination="synapses"/>
        <explicitInput target="excPop/157/EXC" input="baseline_exc" destination="synapses"/>
        <explicitInput target="excPop/158/EXC" input="baseline_exc" destination="synapses"/>
        <explicitInput target="excPop/159/EXC" input="baseline_exc" destination="synapses"/>
        <explicitInput target="excPop/160/EXC" input="baseline_exc" destination="synapses"/>
        <explicitInput target="excPop/161/EXC" input="baseline_exc" destination="synapses"/>
        <explicitInput target="excPop/162/EXC" input="baseline_exc" destination="synapses"/>
        <explicitInput target="excPop/163/EXC" input="baseline_exc" destination="synapses"/>
        <explicitInput target="excPop/164/EXC" input="baseline_exc" destination="synapses"/>
        <explicitInput target="excPop/165/EXC" input="baseline_exc" destination="synapses"/>
        <explicitInput target="excPop/166/EXC" input="baseline_exc" destination="synapses"/>
        <explicitInput target="excPop/167/EXC" input="baseline_exc" destination="synapses"/>
        <explicitInput target="excPop/168/EXC" input="baseline_exc" destination="synapses"/>
        <explicitInput target="excPop/169/EXC" input="baseline_exc" destination="synapses"/>
        <explicitInput target="excPop/170/EXC" input="baseline_exc" destination="synapses"/>
        <explicitInput target="excPop/171/EXC" input="baseline_exc" destination="synapses"/>
        <explicitInput target="excPop/172/EXC" input="baseline_exc" destination="synapses"/>
        <explicitInput target="excPop/173/EXC" input="baseline_exc" destination="synapses"/>
        <explicitInput target="excPop/174/EXC" input="baseline_exc" destination="synapses"/>
        <explicitInput target="excPop/175/EXC" input="baseline_exc" destination="synapses"/>
        <explicitInput target="excPop/176/EXC" input="baseline_exc" destination="synapses"/>
        <explicitInput target="excPop/177/EXC" input="baseline_exc" destination="synapses"/>
        <explicitInput target="excPop/178/EXC" input="baseline_exc" destination="synapses"/>
        <explicitInput target="excPop/179/EXC" input="baseline_exc" destination="synapses"/>
        <explicitInput target="excPop/180/EXC" input="baseline_exc" destination="synapses"/>
        <explicitInput target="excPop/181/EXC" input="baseline_exc" destination="synapses"/>
        <explicitInput target="excPop/182/EXC" input="baseline_exc" destination="synapses"/>
        <explicitInput target="excPop/183/EXC" input="baseline_exc" destination="synapses"/>
        <explicitInput target="excPop/184/EXC" input="baseline_exc" destination="synapses"/>
        <explicitInput target="excPop/185/EXC" input="baseline_exc" destination="synapses"/>
        <explicitInput target="excPop/186/EXC" input="baseline_exc" destination="synapses"/>
        <explicitInput target="excPop/187/EXC" input="baseline_exc" destination="synapses"/>
        <explicitInput target="excPop/188/EXC" input="baseline_exc" destination="synapses"/>
        <explicitInput target="excPop/189/EXC" input="baseline_exc" destination="synapses"/>
        <explicitInput target="excPop/190/EXC" input="baseline_exc" destination="synapses"/>
        <explicitInput target="excPop/191/EXC" input="baseline_exc" destination="synapses"/>
        <explicitInput target="excPop/192/EXC" input="baseline_exc" destination="synapses"/>
        <explicitInput target="excPop/193/EXC" input="baseline_exc" destination="synapses"/>
        <explicitInput target="excPop/194/EXC" input="baseline_exc" destination="synapses"/>
        <explicitInput target="excPop/195/EXC" input="baseline_exc" destination="synapses"/>
        <explicitInput target="excPop/196/EXC" input="baseline_exc" destination="synapses"/>
        <explicitInput target="excPop/197/EXC" input="baseline_exc" destination="synapses"/>
        <explicitInput target="excPop/198/EXC" input="baseline_exc" destination="synapses"/>
        <explicitInput target="excPop/199/EXC" input="baseline_exc" destination="synapses"/>
        <explicitInput target="pvPop/0/PV" input="baseline_pv" destination="synapses"/>
        <explicitInput target="pvPop/1/PV" input="baseline_pv" destination="synapses"/>
        <explicitInput target="pvPop/2/PV" input="baseline_pv" destination="synapses"/>
        <explicitInput target="pvPop/3/PV" input="baseline_pv" destination="synapses"/>
        <explicitInput target="pvPop/4/PV" input="baseline_pv" destination="synapses"/>
        <explicitInput target="pvPop/5/PV" input="baseline_pv" destination="synapses"/>
        <explicitInput target="pvPop/6/PV" input="baseline_pv" destination="synapses"/>
        <explicitInput target="pvPop/7/PV" input="baseline_pv" destination="synapses"/>
        <explicitInput target="pvPop/8/PV" input="baseline_pv" destination="synapses"/>
        <explicitInput target="pvPop/9/PV" input="baseline_pv" destination="synapses"/>
        <explicitInput target="pvPop/10/PV" input="baseline_pv" destination="synapses"/>
        <explicitInput target="pvPop/11/PV" input="baseline_pv" destination="synapses"/>
        <explicitInput target="pvPop/12/PV" input="baseline_pv" destination="synapses"/>
        <explicitInput target="pvPop/13/PV" input="baseline_pv" destination="synapses"/>
        <explicitInput target="pvPop/14/PV" input="baseline_pv" destination="synapses"/>
        <explicitInput target="pvPop/15/PV" input="baseline_pv" destination="synapses"/>
        <explicitInput target="pvPop/16/PV" input="baseline_pv" destination="synapses"/>
        <explicitInput target="pvPop/17/PV" input="baseline_pv" destination="synapses"/>
        <explicitInput target="pvPop/18/PV" input="baseline_pv" destination="synapses"/>
        <explicitInput target="pvPop/19/PV" input="baseline_pv" destination="synapses"/>
        <explicitInput target="pvPop/20/PV" input="baseline_pv" destination="synapses"/>
        <explicitInput target="pvPop/21/PV" input="baseline_pv" destination="synapses"/>
        <explicitInput target="pvPop/22/PV" input="baseline_pv" destination="synapses"/>
        <explicitInput target="pvPop/23/PV" input="baseline_pv" destination="synapses"/>
        <explicitInput target="pvPop/24/PV" input="baseline_pv" destination="synapses"/>
        <explicitInput target="sstPop/0/SST" input="baseline_sst" destination="synapses"/>
        <explicitInput target="sstPop/1/SST" input="baseline_sst" destination="synapses"/>
        <explicitInput target="sstPop/2/SST" input="baseline_sst" destination="synapses"/>
        <explicitInput target="sstPop/3/SST" input="baseline_sst" destination="synapses"/>
        <explicitInput target="sstPop/4/SST" input="baseline_sst" destination="synapses"/>
        <explicitInput target="sstPop/5/SST" input="baseline_sst" destination="synapses"/>
        <explicitInput target="sstPop/6/SST" input="baseline_sst" destination="synapses"/>
        <explicitInput target="sstPop/7/SST" input="baseline_sst" destination="synapses"/>
        <explicitInput target="sstPop/8/SST" input="baseline_sst" destination="synapses"/>
        <explicitInput target="sstPop/9/SST" input="baseline_sst" destination="synapses"/>
        <explicitInput target="sstPop/10/SST" input="baseline_sst" destination="synapses"/>
        <explicitInput target="sstPop/11/SST" input="baseline_sst" destination="synapses"/>
        <explicitInput target="vipPop/0/VIP" input="baseline_vip" destination="synapses"/>
        <explicitInput target="vipPop/0/VIP" input="modVIP" destination="synapses"/>
        <explicitInput target="vipPop/1/VIP" input="baseline_vip" destination="synapses"/>
        <explicitInput target="vipPop/1/VIP" input="modVIP" destination="synapses"/>
        <explicitInput target="vipPop/2/VIP" input="baseline_vip" destination="synapses"/>
        <explicitInput target="vipPop/2/VIP" input="modVIP" destination="synapses"/>
        <explicitInput target="vipPop/3/VIP" input="baseline_vip" destination="synapses"/>
        <explicitInput target="vipPop/3/VIP" input="modVIP" destination="synapses"/>
        <explicitInput target="vipPop/4/VIP" input="baseline_vip" destination="synapses"/>
        <explicitInput target="vipPop/4/VIP" input="modVIP" destination="synapses"/>
        <explicitInput target="vipPop/5/VIP" input="baseline_vip" destination="synapses"/>
        <explicitInput target="vipPop/5/VIP" input="modVIP" destination="synapses"/>
        <explicitInput target="vipPop/6/VIP" input="baseline_vip" destination="synapses"/>
        <explicitInput target="vipPop/6/VIP" input="modVIP" destination="synapses"/>
        <explicitInput target="vipPop/7/VIP" input="baseline_vip" destination="synapses"/>
        <explicitInput target="vipPop/7/VIP" input="modVIP" destination="synapses"/>
        <explicitInput target="vipPop/8/VIP" input="baseline_vip" destination="synapses"/>
        <explicitInput target="vipPop/8/VIP" input="modVIP" destination="synapses"/>
        <explicitInput target="vipPop/9/VIP" input="baseline_vip" destination="synapses"/>
        <explicitInput target="vipPop/9/VIP" input="modVIP" destination="synapses"/>
        <explicitInput target="vipPop/10/VIP" input="baseline_vip" destination="synapses"/>
        <explicitInput target="vipPop/10/VIP" input="modVIP" destination="synapses"/>
        <explicitInput target="vipPop/11/VIP" input="baseline_vip" destination="synapses"/>
        <explicitInput target="vipPop/11/VIP" input="modVIP" destination="synapses"/>
    </network>
</neuroml>
