<Lems>

    <Target component="sim1" />

    <!-- Include core NeuroML2 ComponentType definitions -->
    <Include file="Cells.xml" />
    <Include file="Networks.xml" />
    <Include file="Simulation.xml" />

    <Include file="RateBased.xml" />
    <!-- Inclcude file with the network definition -->
    <Include file="RandomPopulationRate.nml" />

    <rateCell id="E"   Vth="-50mV" Vr="-60mV" Vl="-70mV" Vscale="1mV" gl="6.25nS" tau="28.8ms" tau_r="2ms" r0="30Hz"/>
    <rateCell id="PV"  Vth="-50mV" Vr="-60mV" Vl="-70mV" Vscale="1mV" gl="10nS"   tau="8ms"   tau_r="2ms" r0="50Hz"/>
    <rateCell id="SST" Vth="-50mV" Vr="-60mV" Vl="-70mV" Vscale="1mV" gl="5nS"    tau="16ms"  tau_r="2ms" r0="30Hz"/>
    <rateCell id="VIP" Vth="-50mV" Vr="-60mV" Vl="-70mV" Vscale="1mV" gl="5nS"    tau="16ms"  tau_r="2ms" r0="20Hz"/>

    <!--Dummy synapse which emits no current. Used as presynaptic endpoint for analog synaptic connection.-->
    <silentSynapse id="silent1"/>

    <rateSynapse id="rs" />

    <pulseGenerator id="baseline_ePop" delay="0ms" duration="200ms" amplitude="147.2512 pA" />
    <pulseGenerator id="baseline_pvPop" delay="0ms" duration="200ms" amplitude="386.7281 pA" />
    <pulseGenerator id="baseline_sstPop" delay="0ms" duration="200ms" amplitude="40.2657 pA" />
    <pulseGenerator id="baseline_vipPop" delay="0ms" duration="200ms" amplitude="98.4368 pA" />

    <pulseGenerator id="modVIP" delay="50ms" duration="150ms" amplitude="10 pA" />

    <Simulation id="sim1" length="10ms" step="0.1ms" target="net2">

        <Display id="d2" title="Rates" timeScale="1s" xmin="0" xmax="10" ymin="0" ymax="25">
            <Line id="e" quantity="ePop[0]/r" scale="1Hz" color="#0000ff" timeScale="1ms" />
            <Line id="pv" quantity="pvPop[0]/r" scale="1Hz" color="#ff0000" timeScale="1ms" />
            <Line id="sst" quantity="sstPop[0]/r" scale="1Hz" color="#DDA0DD" timeScale="1ms" />
            <Line id="vip" quantity="vipPop[0]/r" scale="1Hz" color="#00ff00" timeScale="1ms" />
        </Display>

        <OutputFile id="of1" fileName="rates_network_model.dat">
            <OutputColumn id="e" quantity="ePop[0]/r"/>
            <OutputColumn id="pv" quantity="pvPop[0]/r"/>
            <OutputColumn id="sst" quantity="sstPop[0]/r"/>
            <OutputColumn id="vip" quantity="vipPop[0]/r"/>
        </OutputFile>

    </Simulation>

</Lems>
